// COMSOL Multiphysics 6.4.0.429 model "ModelCFixtureCaseBBenchmark.mph"
// Outline of the model tree

Selections
  dom_base: Box | entitydim = 3; zmin = -0.001; zmax = 12.001; condition = inside
  dom_li: Box | entitydim = 3; zmin = 11.499; zmax = 11.851; condition = inside
  dom_llzo: Box | entitydim = 3; zmin = 11.849; zmax = 12.851; condition = inside
  dom_graf: Box | entitydim = 3; zmin = 12.849; zmax = 13.601; condition = inside
  dom_platen: Box | entitydim = 3; zmin = 13.599; zmax = 21.601; condition = inside
  bnd_fixed: Box | entitydim = 2; zmin = -0.001; zmax = 0.001; condition = inside
  bnd_seat: Box | entitydim = 2; zmin = 20.599; zmax = 20.601; condition = inside
  bnd_llzo_top: Box | entitydim = 2; zmin = 12.849; zmax = 12.851; condition = inside
  bnd_slip0: Box
    entitydim = 2
    xmin = 14.15
    xmax = 19.85
    ymin = 14.15
    ymax = 19.85
    zmin = 13.599
    zmax = 21.601
    condition = inside
  bnd_slip1: Box
    entitydim = 2
    xmin = 14.15
    xmax = 19.85
    ymin = -19.85
    ymax = -14.15
    zmin = 13.599
    zmax = 21.601
    condition = inside
  bnd_slip2: Box "Box 2a"
    entitydim = 2
    xmin = -19.85
    xmax = -14.15
    ymin = 14.15
    ymax = 19.85
    zmin = 13.599
    zmax = 21.601
    condition = inside
  bnd_slip3: Box "Box 3a"
    entitydim = 2
    xmin = -19.85
    xmax = -14.15
    ymin = -19.85
    ymax = -14.15
    zmin = 13.599
    zmax = 21.601
    condition = inside

Geometry
  geom1 "Geometry 1" (3D, length unit mm)
    base: Block | size = {50.0, 50.0, 12.0}; pos = {-25.0, -25.0, 0}
    recess: Cylinder | r = 6.45; h = 0.5; pos = {0, 0, 11.5}
    tap0: Cylinder | r = 2.1; h = 12.0; pos = {17.0, 17.0, 0}
    tap1: Cylinder | r = 2.1; h = 12.0; pos = {17.0, -17.0, 0}
    tap2: Cylinder "Cylinder 2a" | r = 2.1; h = 12.0; pos = {-17.0, 17.0, 0}
    tap3: Cylinder | r = 2.1; h = 12.0; pos = {-17.0, -17.0, 0}
    basecut: Difference | input = base; input2 = recess, tap0, tap1, tap2, tap3
    li: Cylinder | r = 6.35; h = 0.35; pos = {0, 0, 11.5}
    llzo: Cylinder | r = 6.35; h = 1.0; pos = {0, 0, 11.85}
    graf: Cylinder | r = 6.35; h = 0.75; pos = {0, 0, 12.85}
    platen: Block | size = {50.0, 50.0, 8.0}; pos = {-25.0, -25.0, 13.6}
    slip0: Cylinder | r = 2.65; h = 8.0; pos = {17.0, 17.0, 13.6}
    seat0: Cylinder | r = 5.5; h = 1.0; pos = {17.0, 17.0, 20.6}
    slip1: Cylinder "Cylinder 1a" | r = 2.65; h = 8.0; pos = {17.0, -17.0, 13.6}
    seat1: Cylinder "Cylinder 1b" | r = 5.5; h = 1.0; pos = {17.0, -17.0, 20.6}
    slip2: Cylinder "Cylinder 2b" | r = 2.65; h = 8.0; pos = {-17.0, 17.0, 13.6}
    seat2: Cylinder "Cylinder 2c" | r = 5.5; h = 1.0; pos = {-17.0, 17.0, 20.6}
    slip3: Cylinder "Cylinder 3a" | r = 2.65; h = 8.0; pos = {-17.0, -17.0, 13.6}
    seat3: Cylinder "Cylinder 3b" | r = 5.5; h = 1.0; pos = {-17.0, -17.0, 20.6}
    platencut: Difference | input = platen; input2 = slip0, seat0, slip1, seat1, slip2, seat2, slip3, seat3
    fin: Finalize "Form Union"

Materials
  mat_base: Common "Material" on selection dom_base
    def: def "Basic"
      density = 2700.0
    Enu: Enu "Young's modulus and Poisson's ratio"
      E = 68900000000.0
      nu = 0.33
  mat_li: Common "Material 2" on selection dom_li
    def: def "Basic"
      density = 1188.0
    Enu: Enu "Young's modulus and Poisson's ratio"
      E = 2740000000.0
      nu = 0.355
  mat_llzo: Common "Material 3" on selection dom_llzo
    def: def "Basic"
      density = 7395.0
    Enu: Enu "Young's modulus and Poisson's ratio"
      E = 151684000000.0
      nu = 0.341
  mat_graf: Common "Material 4" on selection dom_graf
    def: def "Basic"
      density = 952.0
    Enu: Enu "Young's modulus and Poisson's ratio"
      E = 911000000.0
      nu = 0.392
  mat_platen: Common "Material 5" on selection dom_platen
    // same settings as mat_base

Physics
  solid: SolidMechanics on all domains
    dependent variable u = {u, v, w}
    lemm1: LinearElasticModel "Linear Elastic Material 1" (default)
    free1: Free (default)
    init1: init "Initial Values 1" (default)
    fix1: Fixed "Fixed Constraint 1" on selection bnd_fixed
    bl1: BoundaryLoad on selection bnd_seat | LoadType = TotalForce; Ftot = {0, 0, -633.0}

Mesh
  mesh1 "Mesh 1"
    size: MeshSizeDefault | hmax = 5; hmin = 0.9; hcurve = 0.6; hnarrow = 0.5; hgrad = 1.5
    ftet1: FreeTet "Free Tetrahedral 1" on remaining entities
      szc: Size on selection dom_llzo | hmax = 0.6; custom = on
    szg: Size on entire geometry | hmax = 5.0; custom = on

Studies
  std1 "Study 1"
    stat: Stationary

Solver configurations
  sol1 "Solution 1" (study std1)
    v1: Variables "Dependent Variables 1"
    s1: Stationary "Stationary Solver 1"
      fc1: FullyCoupled
      d1: Direct "Suggested Direct Solver (solid)"

Datasets
  dset1: Solution | solution = sol1