// COMSOL Multiphysics 6.4.0.429 model "TrackAFig2CurrentDensity.mph"
// Outline of the model tree

Parameters
  a_lat = 5[um]
  r_void = 2.0[um]
  W = a_lat/2
  D = sqrt(3)*W
  t_li = 2[um]
  t_int = 0.2[um]
  t_ser = 0.2[um]
  t_pel = 1[mm]
  A_cell = 0.283[cm^2]
  A_dom = W*D
  R_pel = 84.3[ohm]
  Q_pel = 5.00e-6
  al_pel = 0.593
  R_int = 15.8[ohm]
  Q_int = 2.14e-3
  al_int = 0.561
  R_ser = 126[ohm]
  sig_li = 1.08e7[S/m]
  sig_void = 1e-12[S/m]
  j_dc = 0.4[mA/cm^2]
  I_app = j_dc*A_dom

Selections
  box_li_bot: Box | entitydim = 3; zmin = -0.01; zmax = 2.01; condition = inside
  box_int_strip: Box | entitydim = 3; zmin = 1.99; zmax = 2.21; condition = inside
  box_pel: Box | entitydim = 3; zmin = 2.19; zmax = 1002.21; condition = inside
  box_int_plate: Box | entitydim = 3; zmin = 1002.19; zmax = 1002.41; condition = inside
  box_li_top: Box | entitydim = 3; zmin = 1002.39; zmax = 1004.41; condition = inside
  box_ser: Box | entitydim = 3; zmin = 1004.39; zmax = 1004.61; condition = inside
  box_v1: Box
    entitydim = 3
    xmin = -0.01
    xmax = 2.6
    ymin = -0.01
    ymax = 2.6
    zmin = -0.01
    zmax = 2.01
    condition = inside
  box_v2: Box "Box 2a"
    entitydim = 3
    xmin = -0.01
    xmax = 2.51
    ymin = 1.7
    ymax = 4.34
    zmin = -0.01
    zmax = 2.01
    condition = inside
  uni_void: Union | entitydim = 3; input = {box_v1, box_v2}
  box_bot: Box | entitydim = 2; zmax = 0.01; condition = inside
  box_top: Box | entitydim = 2; zmin = 1004.59; condition = inside

Geometry
  geom1 "Geometry 1" (3D, length unit µm)
    blk1: Block
      size = {W, D, t_li+t_int+t_pel+t_int+t_li+t_ser}
      layername = {li_bot, int_strip, pel, int_plate, li_top}
      layer = {t_li, t_int, t_pel, t_int, t_li}
      layernameold = {li_bot, int_strip, pel, int_plate, li_top}
    wp1: WorkPlane
      c1: Circle | r = r_void; angle = 90; iscircularsectorold = on
      c2: Circle | r = r_void; angle = 90; pos = {W, D}; rot = 180; iscircularsectorold = on
    ext1: Extrude | workplane = wp1; input = wp1; distance = t_li
    fin: Finalize "Form Union"

Physics
  ec: ConductiveMedia "Electric Currents" on all domains
    dependent variable V
    cucns1: CurrentConservationSolid "Current Conservation in Solids 1" (default)
      sigma_mat = userdef
      sigma = sig_li
      epsilonr_mat = userdef
      epsilonr = 1e-6
    ein1: ElectricInsulation (default)
    init1: init "Initial Values 1" (default)
    cucn_pel: CurrentConservation on selection box_pel
      sigma_mat = userdef
      sigma = (t_pel/A_cell)*(1/R_pel+Q_pel*((i*2*pi*freq*1[s])^al_pel)*1[S])
      epsilonr_mat = userdef
      epsilonr = 1e-6
    cucn_int1: CurrentConservation on selection box_int_strip
      sigma_mat = userdef
      sigma = (t_int/A_cell)*(1/R_int+Q_int*((i*2*pi*freq*1[s])^al_int)*1[S])
      epsilonr_mat = userdef
      epsilonr = 1e-6
    cucn_int2: CurrentConservation on selection box_int_plate
      sigma_mat = userdef
      sigma = (t_int/A_cell)*(1/R_int+Q_int*((i*2*pi*freq*1[s])^al_int)*1[S])
      epsilonr_mat = userdef
      epsilonr = 1e-6
    cucn_ser: CurrentConservation on selection box_ser
      sigma_mat = userdef
      sigma = t_ser/(A_cell*R_ser)
      epsilonr_mat = userdef
      epsilonr = 1e-6
    cucn_void: CurrentConservation on selection uni_void
      sigma_mat = userdef
      sigma = sig_void
      epsilonr_mat = userdef
      epsilonr = 1e-6
    gnd1: Ground on selection box_bot
    term1: Terminal "Boundary Terminal 1" on selection box_top | TerminalType = Current; I0 = I_app

Mesh
  mesh1 "Mesh 1"
    size: MeshSizeDefault | hmax = 100; hmin = 18.1; hcurve = 0.6; hnarrow = 0.5; hgrad = 1.5
    ftri1: FreeTri "Free Triangular 1" on selection box_bot
      sz1: Size on selection box_bot | hmax = 0.2; hmin = 0.03; custom = on
    swe1: Sweep "Swept 1" on remaining entities
      dis_pel: Distribution on selection box_pel
        type = predefined
        elemcount = 35
        elemratio = 20
        symmetric = on
        method = geometric
      dis_i1: Distribution on selection box_int_strip | numelem = 2
      dis_i2: Distribution on selection box_int_plate | numelem = 2
      dis_lb: Distribution on selection box_li_bot | numelem = 4
      dis_lt: Distribution on selection box_li_top | numelem = 3
      dis_se: Distribution on selection box_ser | numelem = 2
      dis_v: Distribution on selection uni_void | numelem = 4

Studies
  std1 "Study 1"
    freq: Frequency "Frequency Domain" | plist = 10

Solver configurations
  sol1 "Solution 1" (study std1)
    v1: Variables "Dependent Variables 1"
    s1: Stationary "Stationary Solver 1"
      p1: Parametric
      fc1: FullyCoupled
      i1: Iterative
        mg1: Multigrid

Datasets
  dset1: Solution | solution = sol1

Plots
  pgb: PlotGroup3D "3D Plot Group" | data = dset1
    surf1: Surface | expr = ec.normJ
      def1: Deform "Deformation 1" | expr = {0, 0, -(z>10[um])*(z-10[um])*0.99}
  pga: PlotGroup3D "3D Plot Group 2" | data = dset1
    vol1: Volume | expr = dom
      def1: Deform "Deformation 1" | expr = {0, 0, -(z>10[um])*(z-10[um])*0.99}

Exports
  img_pgb: Image
    sourceobject = pgb
    size = manualweb
    unit = px
    width = 1400
    height = 1100
    pngfilename = /Users/haozheng/ClaudeOffline/COMSOL X SingleFreqEIS/track_b/fig2b_repro_normJ.png
  img_pga: Image
    sourceobject = pga
    size = manualweb
    unit = px
    width = 1400
    height = 1100
    pngfilename = /Users/haozheng/ClaudeOffline/COMSOL X SingleFreqEIS/track_b/fig2a_repro_domains.png