// COMSOL Multiphysics 6.4.0.429 model "VoidStackPressureMech_LASTCASE_SOLVED.mph"
// Outline of the model tree

Parameters
  rvow = 0.9055
  W = 2.5[um]
  D = 4.330127018922194[um]
  rv = rvow*W

Selections
  dom_li: Box | entitydim = 3; zmin = -2.01; zmax = 0.01; condition = inside
  dom_llzo: Box | entitydim = 3; zmin = -0.01; zmax = 25.01; condition = inside
  bnd_bot: Box | entitydim = 2; zmin = -2.01; zmax = -1.99; condition = inside
  bnd_top: Box | entitydim = 2; zmin = 24.99; zmax = 25.01; condition = inside
  bnd_x0: Box | entitydim = 2; xmin = -0.01; xmax = 0.01; condition = inside
  bnd_xw: Box | entitydim = 2; xmin = 2.49; xmax = 2.51; condition = inside
  bnd_y0: Box | entitydim = 2; ymin = -0.01; ymax = 0.01; condition = inside
  bnd_yd: Box | entitydim = 2; ymin = 4.32012701892; ymax = 4.34012701892; condition = inside
  bnd_iface: Box | entitydim = 2; zmin = -0.01; zmax = 0.01; condition = inside

Geometry
  geom1 "Geometry 1" (3D, length unit µm)
    blkLi: Block | size = {W, D, 2.0}; pos = {0, 0, -2.0}
    blkZ: Block | size = {W, D, 25.0}
    cy1: Cylinder | r = rv; h = 2.0; pos = {0, 0, -2.0}
    cy2: Cylinder | r = rv; h = 2.0; pos = {W, D, -2.0}
    dif1: Difference | input = blkLi; input2 = cy1, cy2
    fin: Finalize "Form Union"

Materials
  mLi: Common "Li (intended, elastic)" on selection dom_li
    def: def "Basic"
      youngsmodulus = 5000000000.0
      poissonsratio = 0.38
      density = 5100
  mZ: Common "LLZO (intended)" on selection dom_llzo
    def: def "Basic"
      youngsmodulus = 150000000000.0
      poissonsratio = 0.25
      density = 5100

Physics
  solid: SolidMechanics on all domains
    dependent variable u = {u, v, w}
    lemm1: LinearElasticModel "Linear Elastic Material 1" (default)
    free1: Free (default)
    init1: init "Initial Values 1" (default)
    fix1: Fixed "Fixed Constraint 1" on selection bnd_bot
    bl1: BoundaryLoad on selection bnd_top | LoadType = ForceArea; FperArea = {0, 0, -5000000.0}
    r1: Roller on selection bnd_x0
    r2: Roller on selection bnd_xw
    r3: Roller on selection bnd_y0
    r4: Roller on selection bnd_yd

Mesh
  mesh1 "Mesh 1"
    size: MeshSizeDefault | hmax = 2.7; hmin = 0.486; hcurve = 0.6; hnarrow = 0.5; hgrad = 1.5
    size1: Size on entire geometry | hmax = 0.35; hmin = 0.02; custom = on
    ftet1: FreeTet "Free Tetrahedral 1" on remaining entities

Studies
  std1 "Study 1"
    stat: Stationary

Solver configurations
  sol1 "Solution 1" (study std1)
    v1: Variables "Dependent Variables 1"
    s1: Stationary "Stationary Solver 1"
      fc1: FullyCoupled
      d1: Direct "Suggested Direct Solver (solid)"

Datasets
  dset1: Solution | solution = sol1