// COMSOL Multiphysics 6.4.0.429 model "ModelBThermalEisGradient.mph"
// Outline of the model tree

Parameters
  r_pel = 0.005[m]
  t_pel = 0.0016[m]
  sig_ref = 0.0844[S/m]
  T_ref = 299.9[K]
  Ea_tot = 0.3769
  eps_b = 50.0
  C_dl = 0.01[F/m^2]
  k_th = 1.5[W/(m*K)]
  rho_s = 4840.0[kg/m^3]
  Cp_s = 500.0[J/(kg*K)]
  kB_eV = 8.617333262e-05
  T_set = 299.9[K]
  dT_grad = 40.0[K]
  V_ac = 10[mV]

Selections
  sel_bot: Box | entitydim = 1; ymin = -1.6e-06; ymax = 1.6e-06; condition = inside
  sel_top: Box | entitydim = 1; ymin = 0.0015984; ymax = 0.0016016; condition = inside
  sel_gb: Box | entitydim = 1; ymin = 0.0007984; ymax = 0.0008016; condition = inside

Geometry
  geom1 "Geometry 1" (2D axisymmetric, length unit m)
    r1: Rectangle | size = {r_pel, t_pel}; layername = lower; layer = t_pel/2; layernameold = lower
    fin: Finalize "Form Union" | symmetriccoord = 8

Physics
  ht: HeatTransfer "Heat Transfer in Solids" on all domains
    dependent variable T
    solid1: SolidHeatTransferModel "Solid 1" (default)
      k_mat = userdef
      k = k_th
      rho_mat = userdef
      rho = rho_s
      Cp_mat = userdef
      Cp = Cp_s
    init1: init "Initial Values 1" (default) | Tinit = T_set
    axi1: AxialSymmetry (default)
    ins1: ThermalInsulation (default)
    tbnd: TemperatureBoundary "Temperature" on selection sel_bot | T0 = T_set
    tbnd2: TemperatureBoundary "Temperature 2" on selection sel_top | T0 = T_set+dT_grad
  ec: ConductiveMedia "Electric Currents" on all domains
    dependent variable V
    cucns1: CurrentConservationSolid "Current Conservation in Solids 1" (default)
      sigma_mat = userdef
      sigma = sig_ref*(T_ref/(T_set + dT_grad*z/t_pel))*exp(-Ea_tot/kB_eV*(1/(T_set + dT_grad*z/t_pel) - 1/T_ref))
      epsilonr_mat = userdef
      epsilonr = eps_b
    axi1: AxialSymmetry (default)
    ein1: ElectricInsulation (default)
    init1: init "Initial Values 1" (default)
    dimp1: DistributedImpedance "Blocking Double Layer" on selection sel_bot
      Vref = 0[V]
      spec_type = thinlayer
      ds = 1[nm]
      sigmabnd_mat = userdef
      sigmabnd = 0.0[S/m]
      epsilonrbnd_mat = userdef
      epsilonrbnd = C_dl*1[nm]/epsilon0_const
    term1: Terminal "Boundary Terminal 1" on selection sel_top | TerminalType = Voltage; V0 = V_ac

Mesh
  mesh1 "Mesh 1"
    size: MeshSizeDefault | hmax = 3.35E-4; hmin = 1.5E-6; hcurve = 0.3; hgrad = 1.3
    ftri1: FreeTri "Free Triangular 1" on remaining entities
    size1: Size on entire geometry | hauto = 2

Studies
  stdThermal "Study"
    stat: Stationary | solve for = {ht, comp1}
  stdEis "Study 2"
    freq: Frequency "Frequency Domain"
      plist = 100 133.352 177.828 237.137 316.228 421.697 562.341 749.894 1000 1333.52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
      solve for = {ec, comp1}

Solver configurations
  sol1 "Solution 1" (study stdThermal)
    v1: Variables "Dependent Variables 1"
    s1: Stationary "Stationary Solver 1"
      fc1: FullyCoupled
      d1: Direct "Direct, heat transfer variables (ht)"
  sol2 "Solution 2" (study stdEis)
    v1: Variables "Dependent Variables 1"
    s1: Stationary "Stationary Solver 1"
      dDef: Direct
      p1: Parametric
      fc1: FullyCoupled

Datasets
  dset1: Solution | solution = sol1
  dset2: Solution | solution = sol2

Plots
  pgNyq: PlotGroup1D "Nyquist (terminal Z)" | data = dset2
    glb1: Global | expr = -imag(ec.V0_1/ec.I0_1); descr = -Im(Z) (ohm); xdata = expr; xdataexpr = real(ec.V0_1/ec.I0_1)